# OpenSim document version 40000
Model:
  Ground
  BodySet:
    Body base: mass=1 [kg] inertia=(0.01 0.01 0.01 0 0 0)
    Body head: mass=1 inertia=(0.01 0.01 0.01 0 0 0)
  JointSet:
    WeldJoint base_to_ground: socket_parent_frame=ground_offset socket_child_frame=base_offset
      PhysicalOffsetFrame ground_offset: socket_parent=/ground translation=(0 0 0) [meters]
      PhysicalOffsetFrame base_offset: socket_parent=/bodyset/base translation=(0 -2 0)
    PinJoint head_to_base: socket_parent_frame=base_offset socket_child_frame=head_offset
      Coordinate rotation_z
      PhysicalOffsetFrame base_offset: socket_parent=/bodyset/base translation=(0 0 0)
      PhysicalOffsetFrame head_offset: socket_parent=/bodyset/head translation=(0 1 0)
